*Heading
** Job name: 600x10 Model name: Model-1
** Generated by: Abaqus/CAE 2021
*Preprint, echo=NO, model=NO, history=NO, contact=NO
** ----------------------------------------------------------------
**
** PART INSTANCE: ala-1
**
*Node
      1, 0.0659999996, 0.0299750008,  0.159999996
      2,  0.065941669, 0.0299750008,  0.159999996
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*Element, type=C3D8I
   1,  1203,  1204,  1805,  1804,     1,     2,   603,   602
   2,  1204,  1205,  1806,  1805,     2,     3,   604,   603
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*Nset, nset=ala-1__PickedSet2, generate
     1,  13222,      1
*Elset, elset=ala-1__PickedSet2, generate
    1,  6000,     1
** Section: seccionDeAcetato
*Solid Section, elset=ala-1__PickedSet2, material=Acetato
,
*System
*Nset, nset=NbordeAtaque, generate
   601,  13222,    601
*Nset, nset=NsurfaceBottom, generate
    1,  1202,     1
*Nset, nset=NsurfaceSide, generate
     1,  12622,    601
*Nset, nset=NsurfaceTop, generate
 12021,  13222,      1
*Surface, type=NODE, name=NbordeDeAtaque
NbordeDeAtaque, 1.
** Constraint: restriccionCinematica
*Coupling, constraint name=restriccionCinematica, ref node=_PickedSet8, surface=NbordeDeAtaque
*Kinematic
*Amplitude, name=Seno, definition=PERIODIC
1,           62.83,              0.,              0.
             0.,              1.
**
** MATERIALS
**
*Material, name=Acetato
*Density
1623.,
*Elastic
 5.377e+09, 0.38
** ----------------------------------------------------------------
**
** STEP: Aleteado
**
*Step, name=Aleteado, nlgeom=YES, inc=100000000
*Dynamic,direct
0.0025,5.,
**
** OUTPUT REQUESTS
**
*Restart, write, frequency=0
**
** FIELD OUTPUT: F-Output-1
**
*Output, field, time interval=0.005
*Node Output
A, U, V
**
** HISTORY OUTPUT: H-Output-1
**
*Output, history, variable=PRESELECT
*End Step
